** Cleaned model 6
** Will be further as a template
*Heading
** Job name: Mask Model name: Model-0
** Generated by: Abaqus/CAE 6.14-1
*Preprint, echo=NO, model=NO, history=NO, contact=NO
**
** PARTS
**
*Part, name=JV-Copy
*Node
      1,   100.196556,   125.723808,   1039.00244
      2,   10.8918266,   131.793671,   1038.63184
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*Element, type=S3
  1,   1,  38, 335
  2, 335,   5,   1
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*End Part
**
**
** ASSEMBLY
**
*Assembly, name=Assembly
**
*Instance, name=JV-Copy-1, part=JV-Copy
78.0000000000001,  -997.467563,   164.826804
78.0000000000001,  -997.467563,   164.826804, 78.5773502795521, -996.890212720448, 165.404154279552, 240.000000890584
*End Instance
**
*Node
      1,         231.,         440.,         171.
*Node
      2,         197.,         431.,         164.
*Node
      3,         156.,         425.,         140.
*Node
      4,          78.,         420.,         137.
*Node
      5,          23.,         426.,         138.
*Node
      6,         -21.,         434.,         162.
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*End Assembly
**
** MATERIALS
**
*Material, name=Material-1
*Density
1.,
*Elastic
 7e+07, 0.31
**
** INTERACTION PROPERTIES
**
*Surface Interaction, name=IntProp-1
1.,
*Friction, slip tolerance=0.005
 0.75,
**
** INTERACTIONS
**
** Interaction: Int-1
*Contact
*Contact Inclusions, ALL EXTERIOR
*Contact Property Assignment
 ,  , IntProp-1
** ----------------------------------------------------------------
**
** STEP: Step-2
**
*Step, name=Step-2, nlgeom=YES, unsymm=YES
*Static, stabilize=0.0002, allsdtol=0.05, continue=NO
0.5, 1., 1e-05, 1.
**
** OUTPUT REQUESTS
**
*Restart, write, frequency=0
*Output, field, frequency=0
*Output, history, frequency=0
*End Step
** ----------------------------------------------------------------
**
** STEP: Step-1
**
*Step, name=Step-1, nlgeom=YES
*Static, stabilize=0.0002, allsdtol=0.05, continue=NO
0.2, 1., 1e-07, 1.
**
** OUTPUT REQUESTS
**
*Restart, write, frequency=0
**
** FIELD OUTPUT: F-Output-1
**
*Output, field, variable=PRESELECT
**
** HISTORY OUTPUT: H-Output-1
**
*Output, history, variable=PRESELECT
*End Step
